// SBML level 2 version 4

model id_8w72()

  // Compartments:
  compartment id_txht = 1;

  // Species:
  species id_bya5 in id_txht = 500/id_txht;
  species id_eyok in id_txht = 0;
  species $id_i3vs in id_txht = 100/id_txht;
  species $id_nmyo in id_txht = 50/id_txht;
  species id_346h in id_txht = 0;

  // Reactions:
  reaction_1: id_bya5 -> id_346h; k1*id_bya5 - k1_rev*id_346h;
    k1 = 0.0005469353; k1_rev = 2.161635e-6;
  reaction_2: id_346h -> id_eyok; k2*id_346h - k2_rev*id_eyok;
    k2 = 0.9995352; k2_rev = 0.2327388;
  reaction_3: id_eyok -> id_bya5; k3*id_eyok - k3_rev*id_bya5;
    k3 = 0.004925998; k3_rev = 1.106197e-5;

  // Unit definitions:
  unit id_hd31 = 1e-9 mole;
end
