// SBML level 2 version 4

model id_9isr()

  // Compartments:
  compartment id_0x25 = 1;

  // Species:
  substanceOnly species id_26b9 in id_0x25 = 0.55*id_0x25;
  substanceOnly species id_htu0 in id_0x25 = 0.8*id_0x25;
  substanceOnly species id_j073 in id_0x25 = 0.43*id_0x25;

  // Reactions:
  rxn_id_26b9: -> id_26b9; -1.342044 + (-2.464208*id_26b9) + (-1.927058*id_htu0) + 7.87019*id_j073 + (-1.043315*id_26b9*id_26b9) + 0.325445*id_htu0*id_htu0 + (-18.79592*id_j073*id_j073) + (-1.702409*id_26b9*id_htu0) + 11.98319*id_26b9*id_j073 + 7.061718*id_htu0*id_j073;
  rxn_id_htu0: -> id_htu0; 15.61472 + 27.64276*id_26b9 + 17.32069*id_htu0 + (-126.7527*id_j073) + 4.290075*id_26b9*id_26b9 + (-1.222776*id_htu0*id_htu0) + 231.1147*id_j073*id_j073 + 6.128892*id_26b9*id_htu0 + (-85.11989*id_26b9*id_j073) + (-47.14552*id_htu0*id_j073);
  rxn_id_j073: -> id_j073; -0.02945188 + 0.001453916*id_26b9 + 0.1024043*id_htu0 + (-0.1359766*id_j073) + 0.0008572531*id_26b9*id_26b9 + 0.0007585687*id_htu0*id_htu0 + 0.119023*id_j073*id_j073 + 0.002104381*id_26b9*id_htu0 + (-0.009793231*id_26b9*id_j073) + (-0.01162468*id_htu0*id_j073);

  // Unit definitions:
  unit id_2b27 = 604800 second;
  unit id_4nc1 = dimensionless;
end
