// SBML level 2 version 4

model id_2d84()

  // Compartments:
  compartment id_lxwv = 1;

  // Species:
  species $id_rxlu in id_lxwv = 0;
  species id_wcye in id_lxwv = 256;
  species id_htjx in id_lxwv = 0;
  species id_1k2r in id_lxwv = 0;
  species id_9fvo in id_lxwv = 0;
  species id_jkjx in id_lxwv = 16.3;

  // Reactions:
  rxn_jkjx_to_k2r: id_jkjx => id_1k2r; 3.64377291e-3*id_jkjx;
  rxn_k2r_to_jkjx: id_1k2r => id_jkjx; 2.70544705e-5*id_1k2r;
  rxn_k2r_to_fvo: id_1k2r => id_9fvo; 1.28286456e-1*id_1k2r;
  rxn_fvo_to_k2r: id_9fvo => id_1k2r; 3.28823568e-1*id_9fvo;
  rxn_fvo_to_jkjx: id_9fvo => id_jkjx; 1.41314244e-1*id_9fvo;
  rxn_htjx_prod: => id_htjx; 4.9573559e-2*id_9fvo;
  rxn_htjx_deg: id_htjx => ; 9.90780624e-1*id_htjx;
  rxn_wcye_cons: id_wcye => $id_rxlu; 5*id_htjx;
end
