// SBML level 2 version 4

model id_8gqu()

  // Compartments:
  compartment id_vvzb = 1;

  // Species:
  species id_unf3 in id_vvzb = 0;
  species id_8zfj in id_vvzb = 0;
  species id_0art in id_vvzb = 0;
  species id_uenr in id_vvzb = 0;
  species id_dk7v in id_vvzb = 0;
  species id_bjlo in id_vvzb = 0;
  species id_56er in id_vvzb = 0;
  species id_7iiw in id_vvzb = 0;

  // Reactions:
  sub1_rxn_id_unf3_to_id_8zfj: id_unf3 => id_8zfj; 0.08*id_unf3;
  sub1_rxn_id_unf3_to_id_uenr: id_unf3 => id_uenr; 0.21*id_unf3;
  sub1_rxn_id_8zfj_to_id_unf3: id_8zfj => id_unf3; 0.23*id_8zfj;
  sub1_rxn_id_8zfj_to_id_uenr: id_8zfj => id_uenr; 100.72*id_8zfj;
  sub1_rxn_id_0art_to_id_8zfj: id_0art => id_8zfj; 0.04*id_0art;
  sub1_rxn_id_0art_to_id_uenr: id_0art => id_uenr; 0.04*id_0art;
  sub1_rxn_id_uenr_to_id_8zfj: id_uenr => id_8zfj; 0.03*id_uenr;
  sub1_rxn_id_uenr_to_id_0art: id_uenr => id_0art; 0.99*id_uenr;
  sub2_rxn_id_56er_to_id_dk7v: id_56er => id_dk7v; 0.08*id_56er;
  sub2_rxn_id_56er_to_id_7iiw: id_56er => id_7iiw; 0.21*id_56er;
  sub2_rxn_id_dk7v_to_id_56er: id_dk7v => id_56er; 0.23*id_dk7v;
  sub2_rxn_id_dk7v_to_id_7iiw: id_dk7v => id_7iiw; 100.72*id_dk7v;
  sub2_rxn_id_bjlo_to_id_dk7v: id_bjlo => id_dk7v; 0.04*id_bjlo;
  sub2_rxn_id_bjlo_to_id_7iiw: id_bjlo => id_7iiw; 0.04*id_bjlo;
  sub2_rxn_id_7iiw_to_id_dk7v: id_7iiw => id_dk7v; 0.03*id_7iiw;
  sub2_rxn_id_7iiw_to_id_bjlo: id_7iiw => id_bjlo; 0.99*id_7iiw;
end
