// SBML level 2 version 4

model id_pblp()

  // Compartments:
  compartment id_eh9b = 1;

  // Species:
  species id_g1f8 in id_eh9b = 200000;
  species id_getd in id_eh9b = 2750000;
  species id_vlky in id_eh9b = 7200000;

  // Reactions:
  reaction_g: -> id_g1f8; id_g1f8*(-4.135487e-2 + 1.933843e-10*id_g1f8 + (-2.988123e-10*id_getd) + (-1.454334e-13*id_vlky));  // modifiers: id_getd, id_vlky
  reaction_d: -> id_getd; id_getd*(1.299968e-1 + (-1.10098e-7*id_g1f8) + (-3.599879e-8*id_getd) + (-1.115393e-13*id_vlky));  // modifiers: id_g1f8, id_vlky
  reaction_v: -> id_vlky; id_vlky*(2.450732e-2 + (-9.55965133e-12*id_g1f8) + (-1.997383e-12*id_getd) + (-2.450011e-9*id_vlky));  // modifiers: id_g1f8, id_getd

  // Unit definitions:
  unit id_ygm1 = 1e-3 litre;
  unit id_pi23 = 86400 second;
  unit id_mtzg = item;
end
