// SBML level 2 version 4

model id_wyxd()

  // Compartments:
  compartment id_a6c1 = 1;

  // Species:
  species id_ri7q in id_a6c1 = 100;
  species id_nzce in id_a6c1 = 10;
  species id_jz57 in id_a6c1 = 75;

  // Reactions:
  reaction_J_synth: => id_jz57; 2.68012/(1 + (id_nzce/59.91147)^3.189769);  // modifiers: id_nzce
  reaction_J_to_R: id_jz57 => id_ri7q; 0.05504753*id_jz57;
  reaction_R_deg: id_ri7q => ; 0.006066897*id_ri7q;
  reaction_N_synth: => id_nzce; 0.00999839*id_ri7q;  // modifiers: id_ri7q
  reaction_N_deg: id_nzce => ; 0.09998384*id_nzce;

  // Unit definitions:
  unit id_g6d6 = 1e-3 litre;
  unit id_6gyg = item;
end
