// SBML level 2 version 4

model main()

  // Compartments:
  compartment id_7vtz = 1;

  // Species:
  species id_mmpx in id_7vtz = 100;
  species id_nmjc in id_7vtz = 800;
  species id_2ba8 in id_7vtz = 200;
  species id_4o87 in id_7vtz = 0;

  // Parameters:
  k_N = 1;
  k_M = 1;
  k_B = 1;
  k_NM = 1;
  k_NB = 1;
  k_MB = 1;

  // Reactions:
  reaction_1: id_nmjc + 30.25059 id_nmjc + 16.41298 id_2ba8 => 58.71948 id_mmpx; id_nmjc;
  reaction_2: id_mmpx + 0.4946039 id_mmpx + 0.001450682 id_nmjc + 0.5945333 id_2ba8 => ; id_mmpx;
  reaction_3: id_2ba8 => 1.172107e-6 id_mmpx + 0.005212212 id_2ba8; id_2ba8;
  reaction_4: id_nmjc + id_mmpx + 0.008316519 id_nmjc => 0.01672139 id_mmpx + 0.0009242689 id_2ba8; id_nmjc*id_mmpx;
  reaction_5: id_nmjc + id_2ba8 + 0.2909564 id_mmpx => 0.1449864 id_nmjc + 0.08163023 id_2ba8; id_nmjc*id_2ba8;
  reaction_6: id_mmpx + id_2ba8 + 8.589832e-6 id_mmpx => 4.287329e-6 id_nmjc + 0.00275739 id_2ba8; id_mmpx*id_2ba8;

  // Unit definitions:
  unit id_7csq = 1e-3 litre;
  unit id_lq3m = 86400 second;
  unit id_9ud5 = 1e-3 mole;
end
