// SBML level 2 version 4

model id_w1dz()

  // Compartments:
  compartment id_bhfw = 1;

  // Species:
  species id_jxje in id_bhfw = 1;
  species id_sywq in id_bhfw = 1;
  species id_7cn0 in id_bhfw = 1;
  species id_puar in id_bhfw = 100000000000;

  // Reactions:
  v_synth_7cn0: => id_7cn0; 33.03376/(1 + (id_sywq/1.279732)^10.33661);  // modifiers: id_sywq
  v_deg_7cn0: id_7cn0 => ; 2.091719*id_7cn0;
  v_synth_jxje: => id_jxje; 1.803018*id_7cn0;  // modifiers: id_7cn0
  v_deg_jxje: id_jxje => ; 2.053616*id_jxje;
  v_synth_sywq: => id_sywq; 0.8543588*id_jxje;  // modifiers: id_jxje
  v_deg_sywq: id_sywq => ; 1.485597*id_sywq;
  v_growth_puar: id_puar => 2 id_puar; 0.3200057*id_sywq*id_puar;  // modifiers: id_sywq

  // Unit definitions:
  unit id_3x54 = 3600 second;
  unit id_cn8n = 1e-3 mole;
end
